// COMSOL Multiphysics 5.4.0.388 model "wat.mph"
// Outline of the model tree

Parameters
  U_mean = 1[m/s]  // 平均流入速度

Functions
  step1: Step "阶跃 1" | location = 0.1

Geometry
  geom1 "几何 1" (2D, length unit m)
    r1: Rectangle "矩形 1" | size = {2.2, 2.2}
    e1: Ellipse "椭圆 1" | pos = {1.1, 1.1}; semiaxes = {0.5, 0.1}
    dif1: Difference "差集 1" | input = r1; input2 = e1
    fin: Finalize "形成联合体"

Materials
  mat1: Common "Water" on all domains
    def "Basic"
      thermalexpansioncoefficient = alpha_p(T)
      bulkviscosity = muB(T)
      dynamicviscosity = eta(T)
      ratioofspecificheat = gamma_w(T)
      electricconductivity = 5.5e-6[S/m]
      heatcapacity = Cp(T)
      density = rho(T)
      thermalconductivity = k(T)
      soundspeed = cs(T)
      eta: Piecewise
        arg = T
        pieces = 
          {273.15, 413.15, 1.3799566804-0.021224019151*T^1+1.3604562827E-4*T^2-4.6454090319E-7*T^3+8.9042735735E-10*T^4-9.0790692686E-13*T^5+3.8457331488E-16*T^6}
          {413.15, 553.75, 0.00401235783-2.10746715E-5*T^1+3.85772275E-8*T^2-2.39730284E-11*T^3}
        argunit = K
        fununit = Pa*s
      Cp: Piecewise | arg = T; pieces = {273.15, 553.75, 12010.1471-80.4072879*T^1+0.309866854*T^2-5.38186884E-4*T^3+3.62536437E-7*T^4}; argunit = K; fununit = J/(kg*K)
      rho: Piecewise
        arg = T
        smooth = contd1
        pieces = 
          {273.15, 293.15, 6.3092789034e-05*T^3-0.0603676398829*T^2+18.9229382407066*T-950.704055329848}
          {293.15, 373.15, 1.0335053319e-05*T^3-0.0133950656345*T^2+4.96928883266*T+432.257114008512}
        argunit = K
        fununit = kg/m^3
      k: Piecewise | arg = T; pieces = {273.15, 553.75, -0.869083936+0.00894880345*T^1-1.58366345E-5*T^2+7.97543259E-9*T^3}; argunit = K; fununit = W/(m*K)
      cs: Interpolation | table = {{273, 1403}, {278, 1427}, {283, 1447}, {293, 1481}, {303, 1507}, {313, 1526}, {323, 1541}, {333, 1552}, {343, 1555}, {353, 1555}, {363, 1550}, {373, 1543}}; interp = piecewisecubic; argunit = K; fununit = m/s
      an1: Analytic | funcname = alpha_p; expr = -1/rho(T)*d(rho(T),T); args = T; argunit = K; fununit = 1/K
      an2: Analytic | funcname = gamma_w; expr = 1+(T/Cp(T))*(alpha_p(T)*cs(T))^2; args = T; argunit = K; fununit = 1
      an3: Analytic | funcname = muB; expr = 2.79*eta(T); args = T; argunit = K; fununit = Pa*s

Physics
  spf: LaminarFlow "层流" on all domains
    dependent variable u = {u, v, w}
    fp1: FluidProperties "流体属性 1" (default)
    init1: init "初始值 1" (default)
    wallbc1: WallBC "壁 1" (default)
    inl1: InletBoundary "入口 1" on boundaries 1 | U0in = U_mean*6*s*(1-s)*step1(t[1/s])
    out1: OutletBoundary "出口 1" on boundaries 4

Mesh
  mesh1 "网格 1" (physics-controlled)
    size: MeshSizeDefault "大小" | table = cfd; hauto = 3

Studies
  std1 "研究 1"
    time: Transient "瞬态" | tlist = range(0,0.2,3.4) range(3.5,0.02,7)

Solver configurations
  sol1 "解 1" (study std1)
    v1: Variables "因变量 1"
    t1: Time "瞬态求解器 1"
      tlist = range(0,0.2,3.4) range(3.5,0.02,7)
      rtol = 0.005
      atolglobalfactor = 0.05
      atolmethod = {comp1_p, scaled, comp1_u, global}
      atolvaluemethod = {comp1_p, factor, comp1_u, factor}
      atolfactor = {comp1_p, 1, comp1_u, 0.1}
      tstepsbdf = intermediate
      maxorder = 2
      stabcntrl = on
      bwinitstepfrac = 0.01
      estrat = exclude
      fc1: FullyCoupled "全耦合 1"
        linsolver = d1
        maxiter = 8
        ntolfact = 0.5
        damp = 0.9
        jtech = once
        stabacc = aacc
        aaccdim = 5
        aaccmix = 0.9
        aaccdelay = 1
      d1: Direct "直接 1" | linsolver = pardiso; pivotperturb = 1.0E-13

Datasets
  dset1: Solution | solution = sol1

Plots
  pg1: PlotGroup2D "速度 (spf)" | data = dset1
    surf1: Surface "表面" | expr = spf.U
    ptr1: ParticleMass "带质量粒子追踪 1"
      mass = 4*pi/3*1e-9
      velstartx = u
      velstarty = v
      xcoord = range(0.1,0.05,0.3)
      ycoord = 0
      dropmethod = freq
      tstart = 3.6
      dropfreq = 0.4
      linetype = none
      pointtype = point
      pointdom = disappear
  pg2: PlotGroup2D "压力 (spf)" | data = dset1
    con1: Contour "等值线" | expr = p

Exports
  data1: Data "数据 1" | data = dset1; filename = C:\Users\hasee\Desktop\Untitled.txt
  plot1: Plot "绘图 1" | filename = C:\Users\hasee\Desktop\Untitled.txt